// SBML level 3 version 2

model SOD1_inhibition(Cell, SOD1_gene)

  // Compartments:
  compartment Cell = 1;

  // Species:
  substanceOnly species pCAS9_sgRNA_complex in Cell = 0;
  substanceOnly species pdCAS9 in Cell = 2;
  substanceOnly species pgRNA in Cell = 2;
  substanceOnly species SOD1_gene in Cell = 2;
  substanceOnly species SOD1_protein in Cell = 0;

  // Parameters:
  kd = 0.0075; kd is "Degradation rate";
  kr_f = 0.5; kr_f is "Forward repression binding rate";
  kr_r = 1; kr_r is "Reverse repression binding rate";
  ka_f = 0.0033; ka_f is "Forward activation binding rate";
  ka_r = 1; ka_r is "Reverse activation binding rate";
  ko_f = 0.033; ko_f is "Forward RNAP binding rate";
  ko_r = 1; ko_r is "Reverse RNAP binding rate";
  kao_f = 1; kao_f is "Forward activated RNAP binding rate";
  kao_r = 1; kao_r is "Reverse activated RNAP binding rate";
  nc = 2; nc is "Stoichiometry of binding";
  nr = 30; nr is "Initial RNAP count";
  ko = 0.05; ko is "Open complex production rate";
  kb = 0.0001; kb is "Basal production rate";
  ng = 2; ng is "Initial promoter count";
  np = 10; np is "Stoichiometry of production";
  ka = 0.25; ka is "Activated production rate";

  // Reactions:
  Production_pdCAS9: => 10 pCAS9_sgRNA_complex; pdCAS9*ko*ko_f/ko_r*nr/(1 + ko_f/ko_r*nr);  // modifiers: pdCAS9
  Production_pgRNA: => 10 pCAS9_sgRNA_complex; pgRNA*ko*ko_f/ko_r*nr/(1 + ko_f/ko_r*nr);  // modifiers: pgRNA
  Production_SOD1_gene: => 10 SOD1_protein; SOD1_gene*ko*(ko_f/ko_r)*nr/(1 + ko_f/ko_r*nr + (kr_f/kr_r*pCAS9_sgRNA_complex)^nc);  // modifiers: SOD1_gene, pCAS9_sgRNA_complex
end
